*HEADING
compact_fdm / lower_lateral_150N
*NODE
1, -56, -19, 243
2, -53.5, -16, 245.5
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*ELEMENT, TYPE=C3D4, ELSET=SOLID
14702, 4776, 5313, 2312, 4788
14703, 4771, 4759, 5375, 2333
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*NSET, NSET=FIXED
357, 358, 359, 361, 368, 369
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*MATERIAL, NAME=PETG_HF
*ELASTIC
2050.0, 0.38
*SOLID SECTION, ELSET=SOLID, MATERIAL=PETG_HF
*STEP
*STATIC
*BOUNDARY
FIXED, 1, 3
*CLOAD
396, 1, 0.753768844
397, 1, 0.753768844
400, 1, 0.753768844
401, 1, 0.753768844
402, 1, 0.753768844
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5602, 1, 0.753768844
*NODE FILE
U
*EL FILE
S
*END STEP
